// SBML level 2 version 1

model BIOMD0000000005()
  // Tyson1991 - Cell Cycle 6 var
  // Mathematical model of the interactions of cdc2 and cyclin.
  // This model is described in the article:
  // Modeling the cell division cycle: cdc2 and cyclin interactions.
  // Tyson JJ.
  // Proc. Natl. Acad. Sci. U.S.A. 1991; 88(16); 7328-32
  // Abstract:
  // The proteins cdc2 and cyclin form a heterodimer (maturation promoting factor) that controls the major events of the cell cycle. A mathematical model for the interactions of cdc2 and cyclin is constructed. Simulation and analysis of the model show that the control system can operate in three modes: as a steady state with high maturation promoting factor activity, as a spontaneous oscillator, or as an excitable switch. We associate the steady state with metaphase arrest in unfertilized eggs, the spontaneous oscillations with rapid division cycles in early embryos, and the excitable switch with growth-controlled division cycles typical of nonembryonic cells.
  // This model is hosted on BioModels Database and identified by: BIOMD0000000005 .
  // To cite BioModels Database, please use: BioModels Database: An enhanced, curated and annotated resource for published quantitative kinetic models .
  // To the extent possible under law, all copyright and related or neighbouring rights to this encoded model have been dedicated to the public domain worldwide. Please refer to CC0 Public Domain Dedication for more information.
  // This model was automatically converted from BIOMD0000000005 to SBML L2V1 by using libSBML.
  // There were the following warnings during the conversion process:
  // In situations where a mathematical expression contains literal numbers or parameters whose units have not been declared, it is not possible to verify accurately the consistency of the units in the expression. The units of the <kineticLaw> <math> expression 'cell * k6 * M' cannot be fully checked. Unit consistency reported as either no errors or further unit errors related to this object may not be accurate.
  // In situations where a mathematical expression contains literal numbers or parameters whose units have not been declared, it is not possible to verify accurately the consistency of the units in the expression. The units of the <kineticLaw> <math> expression 'cell * C2 * k8notP' cannot be fully checked. Unit consistency reported as either no errors or further unit errors related to this object may not be accurate.
  // In situations where a mathematical expression contains literal numbers or parameters whose units have not been declared, it is not possible to verify accurately the consistency of the units in the expression. The units of the <kineticLaw> <math> expression 'cell * CP * k9' cannot be fully checked. Unit consistency reported as either no errors or further unit errors related to this object may not be accurate.
  // In situations where a mathematical expression contains literal numbers or parameters whose units have not been declared, it is not possible to verify accurately the consistency of the units in the expression. The units of the <kineticLaw> <math> expression 'cell * CP * k3 * Y' cannot be fully checked. Unit consistency reported as either no errors or further unit errors related to this object may not be accurate.
  // In situations where a mathematical expression contains literal numbers or parameters whose units have not been declared, it is not possible to verify accurately the consistency of the units in the expression. The units of the <kineticLaw> <math> expression 'cell * k5notP * M' cannot be fully checked. Unit consistency reported as either no errors or further unit errors related to this object may not be accurate.
  // In situations where a mathematical expression contains literal numbers or parameters whose units have not been declared, it is not possible to verify accurately the consistency of the units in the expression. The units of the <kineticLaw> <math> expression 'cell * k1aa' cannot be fully checked. Unit consistency reported as either no errors or further unit errors related to this object may not be accurate.
  // In situations where a mathematical expression contains literal numbers or parameters whose units have not been declared, it is not possible to verify accurately the consistency of the units in the expression. The units of the <kineticLaw> <math> expression 'cell * k2 * Y' cannot be fully checked. Unit consistency reported as either no errors or further unit errors related to this object may not be accurate.
  // In situations where a mathematical expression contains literal numbers or parameters whose units have not been declared, it is not possible to verify accurately the consistency of the units in the expression. The units of the <kineticLaw> <math> expression 'cell * k7 * YP' cannot be fully checked. Unit consistency reported as either no errors or further unit errors related to this object may not be accurate.
  // In situations where a mathematical expression contains literal numbers or parameters whose units have not been declared, it is not possible to verify accurately the consistency of the units in the expression. The units of the <kineticLaw> <math> expression 'cell * pM * (k4prime + k4 * pow(M / CT, 2))' cannot be fully checked. Unit consistency reported as either no errors or further unit errors related to this object may not be accurate.
  // As a principle of best modeling practice, the <species> should set an initial value(amount or concentration) rather than be left undefined. Doing so improves the portability of models between different simulation and analysis systems, and helps make it easier to detect potential errors in models.
  // As a principle of best modeling practice, the <species> should set an initial value(amount or concentration) rather than be left undefined. Doing so improves the portability of models between different simulation and analysis systems, and helps make it easier to detect potential errors in models.
  // As a principle of best modeling practice, the units of a <parameter> should be declared rather than be left undefined. Doing so improves the ability of software to check the consistency of units and helps make it easier to detect potential errors in models.
  // As a principle of best modeling practice, the units of a <parameter> should be declared rather than be left undefined. Doing so improves the ability of software to check the consistency of units and helps make it easier to detect potential errors in models.
  // As a principle of best modeling practice, the units of a <parameter> should be declared rather than be left undefined. Doing so improves the ability of software to check the consistency of units and helps make it easier to detect potential errors in models.
  // As a principle of best modeling practice, the units of a <parameter> should be declared rather than be left undefined. Doing so improves the ability of software to check the consistency of units and helps make it easier to detect potential errors in models.
  // As a principle of best modeling practice, the units of a <parameter> should be declared rather than be left undefined. Doing so improves the ability of software to check the consistency of units and helps make it easier to detect potential errors in models.
  // As a principle of best modeling practice, the units of a <parameter> should be declared rather than be left undefined. Doing so improves the ability of software to check the consistency of units and helps make it easier to detect potential errors in models.
  // As a principle of best modeling practice, the units of a <parameter> should be declared rather than be left undefined. Doing so improves the ability of software to check the consistency of units and helps make it easier to detect potential errors in models.
  // As a principle of best modeling practice, the units of a <parameter> should be declared rather than be left undefined. Doing so improves the ability of software to check the consistency of units and helps make it easier to detect potential errors in models.
  // As a principle of best modeling practice, the units of a <parameter> should be declared rather than be left undefined. Doing so improves the ability of software to check the consistency of units and helps make it easier to detect potential errors in models.
  // As a principle of best modeling practice, the units of a <parameter> should be declared rather than be left undefined. Doing so improves the ability of software to check the consistency of units and helps make it easier to detect potential errors in models.
  // biomodels.db:MODEL6614644188
  // biomodels.db:BIOMD0000000005
  // isDescribedBy pubmed:1831270
  // occursIn taxonomy:33154
  // isVersionOf kegg.pathway:sce04111 GO:0000278
  // hasVersion reactome:REACT_152

  // Compartments:
  compartment cell = 1;  // GO:0005623

  // Species:
  species $EmptySet in cell = 0;
  species cdc2k in cell = 0;  // isVersionOf uniprot:P04551
  species CP in cell = 0.75/cell; CP is "cdc2k-P";  // isVersionOf uniprot:P04551
  species M in cell = 0; M is "p-cyclin_cdc2";  // hasPart uniprot:P04551 interpro:IPR006670
  species pM in cell = 0.25/cell; pM is "p-cyclin_cdc2-p";  // hasPart uniprot:P04551 interpro:IPR006670
  species Y in cell = 0; Y is "cyclin";  // isVersionOf interpro:IPR006670
  species YP in cell = 0; YP is "p-cyclin";  // isVersionOf interpro:IPR006670
  species $YT in cell; YT is "total_cyclin";  // isVersionOf interpro:IPR006670
  species $CT in cell; CT is "total_cdc2";  // isVersionOf uniprot:P04551

  // Assignment rules:
  YT := Y + YP + M + pM;
  CT := cdc2k + CP + M + pM;

  // Reactions:
  cyclin_cdc2k_dissociation: M => cdc2k + YP; cell*k6*M;  // hasVersion reactome:REACT_6308; isVersionOf GO:0000079
    k6 = 1;
  cdc2k_phosphorylation: cdc2k => CP; cell*cdc2k*k8notP;  // isVersionOf ec-code:2.7.11.1 GO:0006468
    k8notP = 1000000;
  cdc2k_dephosphorylation: CP => cdc2k; cell*CP*k9;  // isVersionOf ec-code:3.1.3.16 GO:0006470
    k9 = 1000;
  cyclin_cdc2k_p_association: CP + Y => pM; cell*CP*k3*Y; cyclin_cdc2k_p_association is "cyclin cdc2k-p association";  // hasVersion reactome:REACT_6216 reactome:REACT_6308
    k3 = 200;
  deactivation_of_cdc2_kinase: M => pM; cell*k5notP*M;  // isVersionOf ec-code:2.7.10.2 GO:0006468 GO:0045736; hasVersion reactome:REACT_3178 reactome:REACT_6327
    k5notP = 0;
  cyclin_biosynthesis: $EmptySet => Y; cell*k1aa;  // isVersionOf GO:0006412
    k1aa = 0.015;
  default_degradation_of_cyclin: Y => $EmptySet; cell*k2*Y;  // isVersionOf GO:0008054
    k2 = 0;
  Reaction8: YP => $EmptySet; cell*k7*YP; Reaction8 is "cdc2 kinase triggered degration of cyclin";  // isVersionOf GO:0008054
    k7 = 0.6;
  activation_of_cdc2_kinase: pM => M; cell*pM*(k4prime + k4*(M/CT)^2);  // modifiers: CT; hasVersion reactome:REACT_6257 reactome:REACT_6175 reactome:REACT_6294; isVersionOf ec-code:3.1.3.16 GO:0006470 GO:0045737
    k4 = 180; k4prime = 0.018;
end
